! 3D Model of Fiber/Matrix Debond in Thin-ply FRPC
! Calculation of reaction forces and displacements for external VCCT subroutine in Python

!
!==============================================================================
! Copyright (c) 2016-2018 Université de Lorraine & Luleå tekniska universitet
! Author: Luca Di Stasio <luca.distasio@gmail.com>
!                        <luca.distasio@ingpec.eu>
!
! Redistribution and use in source and binary forms, with or without
! modification, are permitted provided that the following conditions are met:
!
!
! Redistributions of source code must retain the above copyright
! notice, this list of conditions and the following disclaimer.
! Redistributions in binary form must reproduce the above copyright
! notice, this list of conditions and the following disclaimer in
! the documentation and/or other materials provided with the distribution
! Neither the name of the Université de Lorraine & Luleå tekniska universitet
! nor the names of its contributors may be used to endorse or promote products
! derived from this software without specific prior written permission.
!
! THIS SOFTWARE IS PROVIDED BY THE COPYRIGHT HOLDERS AND CONTRIBUTORS "AS IS"
! AND ANY EXPRESS OR IMPLIED WARRANTIES, INCLUDING, BUT NOT LIMITED TO, THE
! IMPLIED WARRANTIES OF MERCHANTABILITY AND FITNESS FOR A PARTICULAR PURPOSE
! ARE DISCLAIMED. IN NO EVENT SHALL THE COPYRIGHT OWNER OR CONTRIBUTORS BE
! LIABLE FOR ANY DIRECT, INDIRECT, INCIDENTAL, SPECIAL, EXEMPLARY, OR
! CONSEQUENTIAL DAMAGES (INCLUDING, BUT NOT LIMITED TO, PROCUREMENT OF
! SUBSTITUTE GOODS OR SERVICES; LOSS OF USE, DATA, OR PROFITS; OR BUSINESS
! INTERRUPTION) HOWEVER CAUSED AND ON ANY THEORY OF LIABILITY, WHETHER IN
! CONTRACT, STRICT LIABILITY, OR TORT (INCLUDING NEGLIGENCE OR OTHERWISE)
! ARISING IN ANY WAY OUT OF THE USE OF THIS SOFTWARE, EVEN IF ADVISED OF THE
! POSSIBILITY OF SUCH DAMAGE.
!==============================================================================
!

/title, 2D Model of Transverse Cracking in Thin-ply FRPC

/prep7               ! Enter the pre-processor

! Parameters

! ===> START INPUT DATA

L = 10.0          ! [um]  length of the RVE
W = 10.0          ! [um]  width of the RVE
Rf = 1.0          ! [um]  fiber's radius
theta0 = 0.0      ! [deg] angular position of debond
deltatheta = 10.0 ! [deg] 2*deltatheta = debond size
deltaphi = 5.0    ! [deg] refined area size
delta = 0.05      ! [deg] angular size of element at crack
aOverW = 0.1      ! [-] ratio of debond length to RVE's width
refWoverA = 0.1   ! [-] ratio of refined region width to debond's length
refRoverR = 0.1   ! [-] ratio of refined radial region to fiber's radius

epsx = 0.01       ! [-]  applied strain
uniP = 0.0        ! [-]  uniform pressure applied to crack face

nContours = 10 ! [-]  number of contours for J-integral evaluation

Em = 3500.0   ! [MPa] matrix Young's modulus
num = 0.4     ! [-] matrix Poisson ratio

fiberMat = 0      ! flag for type of elasticity: 0 -> isotropic, 1 -> engineering constants

EfL = 3500.0! [MPa] fiber Young's modulus
!EfT = 3500.0! [MPa] fiber Young's modulus
nufLT = 0.4! [-] fiber in-plane Poisson ratio
!nufTT = 0.4! [-] fiber transverse Poisson ratio
!GfL = ! [MPa] fiber in-plane shear modulus
!GfT = ! [MPa] fiber transverse shear modulus

! ===> END INPUT DATA

Pi = ACOS(-1)

a = aOverW*W
crackFront = W-a
refVolStart = crackFront + refWoverA*a
refVolStop = crackFront - refWoverA*a

deltathetarad = deltatheta*Pi/180.0
deltaphirad = deltaphi*Pi/180.0
deltarad = delta*Pi/180.0

refArAngStart = deltathetarad-deltaphirad
refArAngStop = deltathetarad+deltaphirad

appliedDisp = epsx*L ! [mm] applied displacement

dispreactfile = 'allDispsRFs'
stressstrainfile = 'allStressStrain'

! Create Geometry

K, 1, -L, W, 0.0     ! SW corner, external face with debond
K, 2, L, W, 0.0      ! SE corner, external face with debond
K, 3, L, W, L        ! NE corner, external face with debond
K, 4, -L, W, L       ! NW corner, external face with debond

K, 5, -L, 0.0, 0.0   ! SW corner, external face without debond
K, 6, L, 0.0, 0.0    ! SE corner, external face without debond
K, 7, L, 0.0, L      ! NE corner, external face without debond
K, 8, -L, 0.0, L     ! NW corner, external face without debond

K, 9, 0.0, W, 0.0    ! Fiber's center, external face with debond
K, 10, 0.0, 0.0, 0.0 ! Fiber's center, external face without debond

K, 11, -Rf, W, 0.0    ! Fiber's west corner, external face with debond
K, 12, Rf, W, 0.0     ! Fiber's east corner, external face with debond
K, 13, Rf, W, 0.0     ! Fiber's coincident east corner (for debond), external face with debond
K, 14, -Rf, 0.0, 0.0  ! Fiber's west corner, external face without debond
K, 15, Rf, 0.0, 0.0   ! Fiber's east corner, external face without debond

L, 1, 11            !1
L, 11, 9            !2
L, 9, 12            !3
L, 13, 2            !4
L, 2, 3             !5
L, 3, 4             !6
L, 4, 1             !7

L, 5, 14               !8
L, 14, 10              !9
L, 10, 15              !10
L, 15, 6               !11
L, 6, 7                !12
L, 7, 8                !13
L, 8, 5                !14

LARC, 14, 15, 10, Rf   !15

L, 2, 6                !16
L, 3, 7                !17
L, 4, 8                !18
L, 1, 5                !19

AL, 5, 17, 12, 16             ! 1
AL, 6, 17, 13, 18             ! 2
AL, 19, 7, 18, 14             ! 3
AL, 8, 15, 11, 12, 13, 14     ! 5
AL, 9, 10, 15                 ! 6

K, 16, Rf*COS(refArAngStart), W, Rf*SIN(refArAngStart)     ! Fiber's interface, start of refined area, external face with debond
K, 17, Rf*COS(refArAngStart), W, Rf*SIN(refArAngStart)     ! Fiber's interface, coincident start of refined area (for debond), external face with debond

K, 18, Rf*COS(deltathetarad), W, Rf*SIN(deltathetarad)     ! Fiber's interface, crack tip, external face with debond
K, 19, Rf*COS(refArAngStop), W, Rf*SIN(refArAngStop)       ! Fiber's interface, end of refined area, external face with debond

K, 20, (1-refRoverR)*Rf*COS(refArAngStart), W, (1-refRoverR)*Rf*SIN(refArAngStart)     ! Fiber's inside neighborhood, start of refined area, external face with debond
K, 21, (1-refRoverR)*Rf*COS(deltathetarad), W, (1-refRoverR)*Rf*SIN(deltathetarad)     ! Fiber's inside neighborhood, crack tip, external face with debond
K, 22, (1-refRoverR)*Rf*COS(refArAngStop), W, (1-refRoverR)*Rf*SIN(refArAngStop)       ! Fiber's inside neighborhood, end of refined area, external face with debond

K, 23, (1+refRoverR)*Rf*COS(refArAngStart), W, (1+refRoverR)*Rf*SIN(refArAngStart)     ! Fiber's outside neighborhood, start of refined area, external face with debond
K, 24, (1+refRoverR)*Rf*COS(deltathetarad), W, (1+refRoverR)*Rf*SIN(deltathetarad)     ! Fiber's outside neighborhood, crack tip, external face with debond
K, 25, (1+refRoverR)*Rf*COS(refArAngStop), W, (1+refRoverR)*Rf*SIN(refArAngStop)       ! Fiber's outside neighborhood, end of refined area, external face with debond

LARC, 12, 16, 9, Rf   !20
LARC, 13, 17, 9, Rf   !21
LARC, 16, 18, 9, Rf   !22
LARC, 17, 18, 9, Rf   !23
LARC, 18, 19, 9, Rf   !24
LARC, 20, 21, 9, Rf   !25
LARC, 21, 22, 9, Rf   !26
LARC, 23, 24, 9, Rf   !27
LARC, 24, 25, 9, Rf   !28

L, 20, 16             !29
L, 21, 18             !30
L, 22, 19             !31
L, 17, 23             !32
L, 18, 24             !33
L, 19, 25             !34

K, 26, Rf*COS(refArAngStart), refVolStart, Rf*SIN(refArAngStart)     ! Fiber's interface, start of refined area, start of refined volume, face with debond
K, 27, Rf*COS(refArAngStart), refVolStart, Rf*SIN(refArAngStart)     ! Fiber's interface, coincident start of refined area (for debond), start of refined volume, face with debond

K, 28, (1-refRoverR)*COS(refArAngStart), refVolStart, (1-refRoverR)*SIN(refArAngStart)     ! Fiber's inside neighborhood, start of refined area, start of refined volume, face with debond
K, 29, (1+refRoverR)*COS(refArAngStart), refVolStart, (1+refRoverR)*SIN(refArAngStart)     ! Fiber's outside neighborhood, start of refined area, start of refined volume, face with debond

K, 30, Rf*COS(deltathetarad), refVolStart, Rf*SIN(deltathetarad)     ! Fiber's interface, crack tip, start of refined volume, face with debond
K, 31, Rf*COS(refArAngStop), refVolStart, Rf*SIN(refArAngStop)       ! Fiber's interface, end of refined area, start of refined volume, face with debond

K, 32, (1-refRoverR)*Rf*COS(refArAngStart), refVolStart, (1-refRoverR)*Rf*SIN(refArAngStart)     ! Fiber's inside neighborhood, start of refined area, start of refined volume, face with debond
K, 33, (1-refRoverR)*Rf*COS(deltathetarad), refVolStart, (1-refRoverR)*Rf*SIN(deltathetarad)     ! Fiber's inside neighborhood, crack tip, start of refined volume, face with debond
K, 34, (1-refRoverR)*Rf*COS(refArAngStop), refVolStart, (1-refRoverR)*Rf*SIN(refArAngStop)       ! Fiber's inside neighborhood, end of refined area, start of refined volume, face with debond

K, 35, (1+refRoverR)*Rf*COS(refArAngStart), refVolStart, (1+refRoverR)*Rf*SIN(refArAngStart)     ! Fiber's outside neighborhood, start of refined area, start of refined volume, face with debond
K, 36, (1+refRoverR)*Rf*COS(deltathetarad), refVolStart, (1+refRoverR)*Rf*SIN(deltathetarad)     ! Fiber's outside neighborhood, crack tip, start of refined volume, face with debond
K, 37, (1+refRoverR)*Rf*COS(refArAngStop), refVolStart, (1+refRoverR)*Rf*SIN(refArAngStop)       ! Fiber's outside neighborhood, end of refined area, start of refined volume, face with debond

K, 38, Rf*COS(refArAngStart), crackFront, Rf*SIN(refArAngStart)     ! Fiber's interface, start of refined area, crack front
K, 39, (1-refRoverR)*COS(refArAngStart), crackFront, (1-refRoverR)*SIN(refArAngStart)     ! Fiber's inside neighborhood, start of refined area, crack front
K, 40, (1+refRoverR)*COS(refArAngStart), crackFront, (1+refRoverR)*SIN(refArAngStart)     ! Fiber's outside neighborhood, start of refined area, crack front

K, 41, Rf*COS(deltathetarad), crackFront, Rf*SIN(deltathetarad)     ! Fiber's interface, crack tip, crack front
K, 42, Rf*COS(refArAngStop), crackFront, Rf*SIN(refArAngStop)       ! Fiber's interface, end of refined area, crack front

K, 43, (1-refRoverR)*Rf*COS(refArAngStart), crackFront, (1-refRoverR)*Rf*SIN(refArAngStart)     ! Fiber's inside neighborhood, start of refined area, crack front
K, 44, (1-refRoverR)*Rf*COS(deltathetarad), crackFront, (1-refRoverR)*Rf*SIN(deltathetarad)     ! Fiber's inside neighborhood, crack tip, crack front
K, 45, (1-refRoverR)*Rf*COS(refArAngStop), crackFront, (1-refRoverR)*Rf*SIN(refArAngStop)       ! Fiber's inside neighborhood, end of refined area, crack front

K, 46, (1+refRoverR)*Rf*COS(refArAngStart), crackFront, (1+refRoverR)*Rf*SIN(refArAngStart)     ! Fiber's outside neighborhood, start of refined area, crack front
K, 47, (1+refRoverR)*Rf*COS(deltathetarad), crackFront, (1+refRoverR)*Rf*SIN(deltathetarad)     ! Fiber's outside neighborhood, crack tip, crack front
K, 48, (1+refRoverR)*Rf*COS(refArAngStop), crackFront, (1+refRoverR)*Rf*SIN(refArAngStop)       ! Fiber's outside neighborhood, end of refined area, crack front

K, 49, Rf*COS(refArAngStart), refVolStop, Rf*SIN(refArAngStart)     ! Fiber's interface, start of refined area, stop of refined volume
K, 50, (1-refRoverR)*COS(refArAngStart), refVolStop, (1-refRoverR)*SIN(refArAngStart)     ! Fiber's inside neighborhood, start of refined area, stop of refined volume
K, 51, (1+refRoverR)*COS(refArAngStart), refVolStop, (1+refRoverR)*SIN(refArAngStart)     ! Fiber's outside neighborhood, start of refined area, stop of refined volume

K, 52, Rf*COS(deltathetarad), refVolStop, Rf*SIN(deltathetarad)     ! Fiber's interface, crack tip, stop of refined volume
K, 53, Rf*COS(refArAngStop), refVolStop, Rf*SIN(refArAngStop)       ! Fiber's interface, end of refined area, stop of refined volume

K, 54, (1-refRoverR)*Rf*COS(refArAngStart), refVolStop, (1-refRoverR)*Rf*SIN(refArAngStart)     ! Fiber's inside neighborhood, start of refined area, stop of refined volume
K, 55, (1-refRoverR)*Rf*COS(deltathetarad), refVolStop, (1-refRoverR)*Rf*SIN(deltathetarad)     ! Fiber's inside neighborhood, crack tip, stop of refined volume
K, 56, (1-refRoverR)*Rf*COS(refArAngStop), refVolStop, (1-refRoverR)*Rf*SIN(refArAngStop)       ! Fiber's inside neighborhood, end of refined area, stop of refined volume

K, 57, (1+refRoverR)*Rf*COS(refArAngStart), refVolStop, (1+refRoverR)*Rf*SIN(refArAngStart)     ! Fiber's outside neighborhood, start of refined area, stop of refined volumet
K, 58, (1+refRoverR)*Rf*COS(deltathetarad), refVolStop, (1+refRoverR)*Rf*SIN(deltathetarad)     ! Fiber's outside neighborhood, crack tip, stop of refined volume
K, 59, (1+refRoverR)*Rf*COS(refArAngStop), refVolStop, (1+refRoverR)*Rf*SIN(refArAngStop)       ! Fiber's outside neighborhood, end of refined area, stop of refined volume

! Areas

AL, 1, 2, 12, 11, 10     ! 1, lower ply, coarse area
AL, 13, 14, 5, 6, 7      ! 2, upper ply, coarse area

AL, 11, 20, 18, 9        ! 3, lower ply, free area
AL, 19, 21, 13, 8        ! 4, upper ply, free area

AL, 12, 3, 17, 15, 20    ! 5, lower ply, bonded area
AL, 4, 14, 21, 16, 17    ! 6, upper ply, bonded area

! Define Material Properties

*IF, crossPly, EQ, 0, THEN
   MP,EX,1,ET        ! 1 is cross-ply, 2 is ud-ply
   MP,NUXY,1,nuTT    ! mp,Poisson's ratio,material number,value
*ELSE
   MP,EX,1,ET        ! 1 is cross-ply, 2 is ud-ply
   MP,EY,1,ET        ! 1 is cross-ply, 2 is ud-ply
   MP,EZ,1,EL        ! 1 is cross-ply, 2 is ud-ply
   MP,NUXY,1,nuTT    ! mp,Poisson's ratio,material number,value
   MP,NUYZ,1,nuLT    ! mp,Poisson's ratio,material number,value
   MP,NUXZ,1,nuLT    ! mp,Poisson's ratio,material number,value
   MP,GXY,1,GTT      ! mp,Poisson's ratio,material number,value
   MP,GYZ,1,GLT      ! mp,Poisson's ratio,material number,value
   MP,GXZ,1,GLT      ! mp,Poisson's ratio,material number,value
*ENDIF

*IF, udPly, EQ, 0, THEN
   MP,EX,2,EL        ! 1 is cross-ply, 2 is ud-ply
   MP,NUXY,2,nuLT    ! mp,Poisson's ratio,material number,value
*ELSE
   MP,EX,2,EL        ! 1 is cross-ply, 2 is ud-ply
   MP,EY,2,ET        ! 1 is cross-ply, 2 is ud-ply
   MP,EZ,2,ET        ! 1 is cross-ply, 2 is ud-ply
   MP,NUXY,2,nuLT    ! mp,Poisson's ratio,material number,value
   MP,NUYZ,2,nuTT    ! mp,Poisson's ratio,material number,value
   MP,NUXZ,2,nuLT    ! mp,Poisson's ratio,material number,value
   MP,GXY,2,GLT      ! mp,Poisson's ratio,material number,value
   MP,GYZ,2,GTT      ! mp,Poisson's ratio,material number,value
   MP,GXZ,2,GLT      ! mp,Poisson's ratio,material number,value
*ENDIF

MP,MU,3,0

! Assign properties to areas
! ASEL, Type, Item, Comp, VMIN, VMAX, VINC, KSWP
! AATT, MAT, REAL, TYPE, ESYS, SECN
ASEL, S, AREA, , 1
AATT, 1
ASEL, S, AREA, , 3
AATT, 1
ASEL, S, AREA, , 5
AATT, 1
ASEL, S, AREA, , 2
AATT, 2
ASEL, S, AREA, , 4
AATT, 2
ASEL, S, AREA, , 6
AATT, 2

ALLSEL

KSEL, S, KP, , 7
CM,CRACKTIP,KP

ALLSEL

! Seed the edges
! LESIZE, NL1, SIZE, ANGSIZ, NDIV, SPACE, KFORC, LAYER1, LAYER2, KYNDIV
LESIZE, 11, elSize
LESIZE, 12, elSize
LESIZE, 13, elSize
LESIZE, 14, elSize
LESIZE, 3, elSize
LESIZE, 4, elSize
LESIZE, 8, elSize
LESIZE, 9, elSize
LESIZE, 20, elSize
LESIZE, 21, elSize
LESIZE, 15, elSize
LESIZE, 16, elSize
LESIZE, 18, elSize
LESIZE, 19, elSize

! Define Element Type

ET,1,PLANE183,0,,2      ! Quadratic plane strain quadrilaterals
ET,2,PLANE183,1,,2      ! Quadratic plane strain triangles
ET,3,CONTA172
KEYOPT, 3, 1, 0
KEYOPT, 3, 2, 0

ALLSEL

! Generate mesh
! MSHKEY, KEY (0 == free, 1 == mapped)
! AMESH, NA1, NA2, NINC
MSHKEY, 1
AMESH, 1, 2, 1
MSHKEY, 0
AMESH, 3, 4, 1

ALLSEL

LSEL,S,LINE,,18
NSLL,S,1
TYPE,3
MAT,3
ESURF

LSEL,S,LINE,,19
NSLL,S,1
TYPE,3
MAT,3
ESURF

ALLSEL

FINISH              ! Finish pre-processing

/SOLU               ! Enter the solution processor

ANTYPE,0            ! Analysis type,static

! Define Displacement Constraints on Lines   (dl command)
! DL, LINE, AREA, Lab, Value1, Value2
DL, 1, ,SYMM
DL, 7, ,SYMM
DL, 8, ,SYMM
DL, 2, ,UX,appliedDisp
DL, 3, ,UX,appliedDisp
DL, 4, ,UX,appliedDisp
DL, 5, ,UX,appliedDisp

ALLSEL

! Coincident constraints
LSEL,S,LINE,,15,16,1
NSLL,S,1
CPINTF,ALL

ALLSEL

! Apply pressure, if present
! SFL, Line, Lab, VALI, VALJ, VAL2I, VAL2J
*IF, uniP, GT, 0.0, THEN
   SFL, 9, PRES, uniP
   SFL, 10, PRES, uniP
   SFL, 18, PRES, uniP
   SFL, 19, PRES, uniP
*ENDIF

! For output setting: OUTRES, Item, Freq, Cname, -- , NSVAR, DSUBres

OUTRES, NSOL
OUTRES, NLOAD
OUTRES, STRS
OUTRES, EPEL
OUTRES, LOCI
OUTRES, RSOL

SOLVE                ! Solve the problem

FINISH               ! Finish the solution processor

SAVE                 ! Save your work to the database

/POST1               ! Post processing

PRCINT, 2, , JINT

ALLSEL

*GET,NNodes,NODE,0,COUNT                  !Get the number of nodes in the selected set
*DIM, resArray, ARRAY, NNodes, 13
*VGET, resArray(1,1), NODE, , NLIST
*VGET, resArray(1,2), NODE, 1, LOC, X
*VGET, resArray(1,3), NODE, 1, LOC, Y
*VGET, resArray(1,4), NODE, 1, U, X
*VGET, resArray(1,5), NODE, 1, U, Y
*VGET, resArray(1,6), NODE, 1, S, X
*VGET, resArray(1,7), NODE, 1, S, Y
*VGET, resArray(1,8), NODE, 1, S, XY
*VGET, resArray(1,9), NODE, 1, EPEL, X
*VGET, resArray(1,10), NODE, 1, EPEL, Y
*VGET, resArray(1,11), NODE, 1, EPEL, XY
*VGET, resArray(1,12), NODE, 1, RF, FX
*VGET, resArray(1,13), NODE, 1, RF, FY

*CFOPEN, dispreactfile, csv
*VWRITE, 'NODE','LABEL,','X[mm],','Z[mm],','UX','[mm],','UZ','[mm],','RX','[kN],','RZ','[kN]'
(A5,A6,A6,A6,A2,A5,A2,A5,A2,A5,A2,A4)
*VWRITE, resArray(1,1), ',', resArray(1,2), ',', resArray(1,3), ',', resArray(1,4), ',', resArray(1,5), ',', resArray(1,12), ',', resArray(1,13)
(F7.0,A1,F12.8,A1,F12.8,A1,F12.8,A1,F12.8,A1,F12.8,A1,F12.8)
*CFCLOS

*CFOPEN, stressstrainfile, csv
*VWRITE, 'NODE','LABEL,','SX','[MPa],','SZ','[MPa],','SXZ','[MPa],','EX','[-],','EZ','[-],','EXZ','[-]'
(A5,A6,A2,A6,A2,A6,A3,A6,A2,A4,A2,A4,A3,A3)
*VWRITE, resArray(1,1), ', ', resArray(1,6), ', ', resArray(1,7), ', ', resArray(1,8), ', ', resArray(1,9), ', ', resArray(1,10), ', ', resArray(1,11)
(F7.0,A1,F12.8,A1,F12.8,A1,F12.8,A1,F12.8,A1,F12.8,A1,F12.8)
*CFCLOS

PRCINT, 2, , JINT
PRCINT, 1, , G1
PRCINT, 1, , G2

/EOF
