! Command File mode of 2D Model of Transverse Cracking in Thin-ply FRPC

/title, 2D Model of Transverse Cracking in Thin-ply FRPC

/prep7               ! Enter the pre-processor

! Parameters

! ===> START INPUT DATA

Vf = 0.0! [-] Fiber volume fraction

t = 1             ! [mm] 2t = thickness of the element
tRatio = 1        ! [-]  ratio of bounding ply thickness to main ply
aLRatio = 0.1     ! [-]  ratio of crack length to main ply thickness
rhon = 0.01       ! [-]  normalized crack density
daOvera = 0.05    ! [-]  ratio of crack increment (i.e. crack tip element size) to crack length
epsx = 0.01       ! [-]  applied strain
uniP = 0.0        ! [-]  uniform pressure applied to crack face
reftRatio = 0.2   ! [-]  ratio of refined area height to cross-ply thickness

nContours = 10 ! [-]  number of contours for J-integral evaluation

EL = 3500.0! [MPa] UD longitudinal Young's modulus
ET = 3500.0! [MPa] UD transverse Young's modulus
nuLT = 0.4! [-] UD in-plane Poisson ratio
nuTT = 0.4! [-] UD transverse Poisson ratio
!GL = ! [MPa] UD in-plane shear modulus
!GT = ! [MPa] UD transverse shear modulus

! ===> END INPUT DATA

L = 2*t/rhon        ! [mm] length of the RVE
a = aLRatio*L     ! [mm] 2a = crack length

refHlow = (1-reftRatio)*t
refHup = (1+reftRatio)*t

tBPly = tRatio*(2*t) ! [mm] thickness of the bounding ply
tTOT = t + tBPly     ! [mm] thickness of the bounding ply

elSize = daOvera*a ! [mm] size of element in refined region close to crack tip

vcctRegion = a+elSize

appliedDisp = epsx*L ! [mm] applied displacement

dispreactfile = 'allDispsRFs'
stressstrainfile = 'allStressStrain'

! Create Geometry

! Points

K, 1, 0.0, 0.0
K, 2, L, 0.0
K, 3, L, tTOT
K, 4, 0.0, tTOT

K, 5, 0.0, refHlow
K, 6, L, refHlow
K, 7, L, refHup
K, 8, 0.0, refHup

K, 9, a, refHlow
K,10, a, t
K,11, a, t
K,12, a, refHup
K,13, 0.0, t
K,14, 0.0, t
K,15, vcctRegion,t

K,16, L, t

! Lines

L, 1, 2            !1
L, 2, 6            !2
L, 6, 16           !3
L, 16, 7           !4
L, 7, 3            !5
L, 3, 4            !6
L, 4, 8            !7
L, 8, 14           !8
L, 13, 5           !9
L, 5, 1            !10
L, 5, 9            !11
L, 9, 6            !12
L, 8, 12           !13
L, 12, 7           !14
L, 10, 15          !15
L, 11, 15          !16
L, 15, 16          !17
L, 13, 10          !18
L, 14, 11          !19
L, 9, 10           !20
L, 11, 12          !21

! Areas

AL, 1, 2, 12, 11, 10     ! 1, lower ply, coarse area
AL, 13, 14, 5, 6, 7      ! 2, upper ply, coarse area

AL, 11, 20, 18, 9        ! 3, lower ply, free area
AL, 19, 21, 13, 8        ! 4, upper ply, free area

AL, 12, 3, 17, 15, 20    ! 5, lower ply, bonded area
AL, 4, 14, 21, 16, 17    ! 6, upper ply, bonded area
